// SBML level 2 version 4

model untitled()

  // Compartments:
  compartment default = 1 volume;
  compartment c1 in default = 1 volume;
  compartment c2 in default = 1 volume;

  // Species:
  // concentration of synuclein monomers
  substanceOnly species aS in c1 = 5e-5;
  // Mass concentration of aggregate
  species M in c1 = 0;
  // Molar/molecular concentartion of aggregates (or mass/lenght)
  species P in c1 = 0;
  // concentration of synuclein monomers
  substanceOnly species aS_in in c2 = 5e-5;
  // Mass concentration of aggregate
  species M_in in c2 = 0;
  // Molar/molecular concentartion of aggregates (or mass/lenght)
  species P_in in c2 = 0;
  species aS_seq in c2 = 0;
  species aS_in_tot in default;
  species M_tot in default;
  species P_tot in default;
  species M_seq in c2 = 0;
  species P_seq in c2 = 0;
  species totmassout in default;
  species totmassin in default;
  species all_tot_in in default;
  species aS_tot in default;
  species totaggrmassin in default;

  // Parameters:
  Kp_aS = 10 substance;
  Ks_aS has substance;
  kin = 1 substance;
  kout has substance;
  kseq = 0 substance;
  kfree = 1 substance;
  S has substance;
  kn_mod = 1 substance;
  kplus_mod = 1 substance;
  koff_mod = 1 substance;
  k2_mod = 1 substance;
  kminus_mod = 1 substance;
  kminus_anti_mod = 1 substance;
  kplus = 500 substance;
  kn = 0.1 substance;
  koff = 0 substance;
  k2 = 800 substance;
  kminus = 0 substance;
  kn_in has substance;
  kplus_in has substance;
  koff_in has substance;
  k2_in has substance;
  kminus_in has substance;
  Kp_aggr = 1 substance;
  kin_aggr = 0 substance;
  kout_aggr has substance;
  Ks_aggr has substance;
  kseq_aggr = 0 substance;
  kfree_aggr = 1 substance;
  n1 = 2 substance;
  n2 = 2 substance;
  nmin = 2 substance;
  phi = 0.01 substance;

  // Assignment rules:
  kout := (1 + Ks_aS)/Kp_aS*kin;
  Ks_aS := kseq/kfree;
  aS_in_tot := aS_in + aS_seq;
  M_tot := S/(S + 1)*M + 1/(S + 1)*(M_in + M_seq);
  P_tot := S/(1 + S)*P + 1/(1 + S)*(P_in + P_seq);
  kn_in := kn*kn_mod;
  kplus_in := kplus*kplus_mod;
  koff_in := koff*koff_mod;
  k2_in := k2*k2_mod;
  kminus_in := kminus*kminus_mod;
  kout_aggr := (1 + Ks_aggr)/Kp_aggr*kin_aggr;
  Ks_aggr := kseq_aggr/kfree_aggr;
  totmassout := aS + M;
  totmassin := 1/S*(aS_in + aS_seq + M_in + M_seq);
  aS_tot := S/(1 + S)*aS + 1/(1 + S)*(aS_in + aS_seq);
  all_tot_in := aS_in + aS_seq + M_in + M_seq;
  totaggrmassin := 1/S*(M_in + M_seq);
  S := (1 - phi)/phi;

  // Reactions:
  // primary nucleation
  Primary_nucleation_out: n1 aS => P + n1 M; aS^n1*kn;
  Elongation_out: aS + P => P + M; 2*aS*P*kplus;
  Dissociation_out: P + M => aS + P; 2*P*koff;
  Secondary_nucl_out: n2 aS => P + n2 M; aS^n2*M*k2; Secondary_nucl_out is "Secondary nucl. out";
  Fragmentation_out: M => P + M; M*kminus;
  antiFragmentation_out: P + M => M; P*nmin*kminus;
  // primary nucleation
  Primary_nucleation_in: n1 aS_in => P_in + n1 M_in; aS_in^n1*kn_in;
  Elongation_in: aS_in + P_in => P_in + M_in; 2*aS_in*P_in*kplus_in;
  Dissociation_in: P_in + M_in => aS_in + P_in; 2*P_in*koff_in;
  Secondary_nucl_in: n2 aS_in => P_in + n2 M_in; aS_in^n2*M_in*k2_in; Secondary_nucl_in is "Secondary nucl. in";
  Fragmentation_in: M_in => P_in + M_in; M_in*kminus_in;
  antiFragmentation_in: P_in + M_in => M_in; P_in*nmin*kminus_in;
  aS_transport_in: aS => S aS_in; aS*kin;
  aS_transport_out: S aS_in => aS; aS_in*kout;
  M_transport_in: M => S M_in; M*kin_aggr;
  re22: S M_in => M; M_in*kout_aggr; re22 is "M transport out";
  P_transport_in: P => S P_in; P*kin_aggr;
  re24: S P_in => P; P_in*kout_aggr; re24 is "M transport out";
  re25: aS_in => aS_seq; aS_in*kseq;
  re26: aS_seq => aS_in; aS_seq*kfree;
  re27: P_in => P_seq; P_in*kseq_aggr;
  re28: P_seq => P_in; P_seq*kfree_aggr;
  re29: M_in => M_seq; M_in*kseq_aggr;
  re30: M_seq => M_in; M_seq*kfree_aggr;

  // Unit definitions:
  unit substance = mole;
  unit volume = litre;
  unit area = metre^2;
  unit length = metre;
  unit time = second;
end
